// COMSOL Multiphysics 6.0.0.318 model "ЛР4, Приклад 3.2.mph"
// Outline of the model tree
// Unit system: none

Functions
  an1: Analytic | funcname = K; expr = x/(1+t^2); args = {x, t}

Variables
  var1 "Variables 1"
    L = a0+a1*x+c1*abs(x-0.3)+c2*abs(x-0.7)
    R = L-intop1(L*K(dest(x),x))-1-x^2

Couplings
  intop1: Integration on all domains

Geometry
  geom1 "Geometry 1" (1D, length unit m)
    i1: Interval | coord = 0, 1
    fin: Finalize "Form Union"

Physics
  ge: GlobalEquations "Global ODEs and DAEs"
    ge1: GlobalEquations
      name = {a0, c1, c2, a1}
      equation = {at1(0.0,R), at1(0.3,R), at1(0.7,R), at1(1,R)}
      initialValueU = {0, 0, 0, 0}
      initialValueUt = {0, 0, 0, 0}
      description = {, , , }
      valueType = complex
      DependentVariableQuantity = dimensionless
      CustomDependentVariableUnit = m
      SourceTermQuantity = dimensionless
      CustomSourceTermUnit = m

Mesh
  mesh1 "Mesh 1" (physics-controlled)

Studies
  std1 "Study 1"
    stat: Stationary

Solver configurations
  sol1 "Solution 1" (study std1)
    v1: Variables "Dependent Variables 1"
    s1: Stationary "Stationary Solver 1"
      dDef: Direct
      fc1: FullyCoupled | linsolver = dDef

Datasets
  dset1: Solution | solution = sol1

Derived values
  gev1: EvalGlobal "Global Evaluation 1"
    data = dset1
    table = tbl1
    expr = {a0, c1, c2, a1}
    descr = {State variable a0, State variable c1, State variable c2, State variable a1}

Tables
  tbl1: Table
    // Global Evaluation 1
    State variable a0 | State variable c1 | State variable c2 | State variable a1
    0.65 | 0.35 | 0.35 | 2.55402

Plots
  pg1: PlotGroup1D "1D Plot Group 1" | data = dset1
    lngr1: LineGraph on all domains | expr = L; xdata = expr; xdataexpr = x
    lngr2: LineGraph on all domains | expr = 1+x^2+2*x/(2-log(2)); xdata = expr; xdataexpr = x