// COMSOL Multiphysics 6.0.0.318 model "ЛР4, Приклад 3.3.mph"
// Outline of the model tree
// Unit system: none

Functions
  an1: Analytic | funcname = K; expr = x-t; args = {x, t}

Variables
  var1 "Variables 1"
    S1 = a0+a1*x+a2*x^2+a3*x^3
    S2 = c1*abs(x-2)^3+c2*abs(x-3)^3+c3*abs(x-4)^3
    S = S1+S2
    R = d(S,x)-intop1(S*K(dest(x),x)*(x<=dest(x)))+1

Couplings
  intop1: Integration on all domains

Geometry
  geom1 "Geometry 1" (1D, length unit m)
    i1: Interval | coord = {0, 6}
    fin: Finalize "Form Union"

Physics
  ge: GlobalEquations "Global ODEs and DAEs"
    ge1: GlobalEquations
      name = {a0, c1, c2, c3, a1, a2, a3}
      equation = {at1(0,S)-1, at1(2,R), at1(3,R), at1(4,R), at1(5,R), at1(5.5,R), at1(6,R)}
      initialValueU = {0, 0, 0, 0, 0, 0, 0}
      initialValueUt = {0, 0, 0, 0, 0, 0, 0}
      description = {, , , , , , }
      valueType = complex
      DependentVariableQuantity = dimensionless
      CustomDependentVariableUnit = m
      SourceTermQuantity = dimensionless
      CustomSourceTermUnit = m

Mesh
  mesh1 "Mesh 1" (physics-controlled)

Studies
  std1 "Study 1"
    stat: Stationary

Solver configurations
  sol1 "Solution 1" (study std1)
    v1: Variables "Dependent Variables 1"
    s1: Stationary "Stationary Solver 1"
      dDef: Direct
      fc1: FullyCoupled | linsolver = dDef

Datasets
  dset1: Solution | solution = sol1

Derived values
  gev1: EvalGlobal "Global Evaluation 1"
    data = dset1
    expr = {a0, c1, c2, c3, a1, a2, a3}
    descr = {State variable a0, State variable c1, State variable c2, State variable c3, State variable a1, State variable a2, State variable a3}

Plots
  pg1: PlotGroup1D "1D Plot Group 1" | data = dset1
    lngr1: LineGraph on all domains | expr = S; xdata = expr; xdataexpr = x
    lngr2: LineGraph on all domains
      expr = exp(-x/2)*(cos(sqrt(3)/2*x)-1/sqrt(3)*sin(sqrt(3)/2*x))
      xdata = expr
      xdataexpr = x