// COMSOL Multiphysics 6.0.0.318 model "ЛР4, Приклад 3.4.mph"
// Outline of the model tree
// Unit system: none

Functions
  an1: Analytic | funcname = K; expr = exp(-x+t)*sin(x-t); args = {x, t}
  an2: Analytic | funcname = f; expr = exp(-x)

Variables
  var1 "Variables 1"
    y1 = intop1(f(x)*K(dest(x),x)*(x<=dest(x)))
    y2 = intop1(y1*K(dest(x),x)*(x<=dest(x)))
    y3 = intop1(y2*K(dest(x),x)*(x<=dest(x)))
    Y = f(x)+y1+y2+y3

Couplings
  intop1: Integration on all domains

Geometry
  geom1 "Geometry 1" (1D, length unit m)
    i1: Interval | coord = {0, 3}
    fin: Finalize "Form Union"

Physics
  ge: GlobalEquations "Global ODEs and DAEs"
    ge1: GlobalEquations
      valueType = complex
      DependentVariableQuantity = dimensionless
      CustomDependentVariableUnit = m
      SourceTermQuantity = dimensionless
      CustomSourceTermUnit = m

Mesh
  mesh1 "Mesh 1" (physics-controlled)

Studies
  std1 "Study 1"
    stat: Stationary

Solver configurations
  sol1 "Solution 1" (study std1)
    v1: Variables "Dependent Variables 1"
    s1: Stationary "Stationary Solver 1"
      dDef: Direct
      fcDef: FullyCoupled

Datasets
  dset1: Solution | solution = sol1

Plots
  pg1: PlotGroup1D "1D Plot Group 1" | data = dset1
    lngr1: LineGraph on all domains | expr = exp(-x)*(x^2/2+1); xdata = expr; xdataexpr = x
    lngr2: LineGraph on all domains | expr = Y; xdata = expr; xdataexpr = x