// COMSOL Multiphysics 6.0.0.318 model "ЛР4, Приклад 4.1.mph"
// Outline of the model tree
// Unit system: none

Parameters
  a = -1
  r = 0.5
  x0 = 0.3
  y0 = 0.3
  n = 6
  p = 2*pi/n

Functions
  an1: Analytic | funcname = g; expr = (2-abs(x)-abs(y)-abs(abs(y)-abs(x)))/2; args = {x, y}

Couplings
  aveop1: Average on all domains
  intop1: Integration on boundaries 11-13

Geometry
  geom1 "Geometry 1" (2D, length unit m)
    sq1: Square | base = center; size = 2
    c1: Circle | pos = {x0, y0}; r = r
    cb1: CubicBezier "Cubic Bézier 1" | p = {{-1, 1, -1, 1}, {-1, 1, -1, 1}}
    fin: Finalize "Form Union"

Physics
  poeq: PoissonEquation "Poisson's Equation" on all domains
    dependent variable u
    peq1: PoissonEquation "Poisson's Equation 1" (default) | f = f; c = {-1, 0, 0, -1}
    zflx1: ZeroFluxBoundary "Zero Flux 1" (default)
    init1: init "Initial Values 1" (default)
    dir1: DirichletBoundary "Dirichlet Boundary Condition 1" on boundaries 1-4 | r = 0
    ge1: GlobalEquations
      name = f
      equation = a-sum(at2(x0+r*cos(k*p),y0+r*sin(k*p),u),k,0,n-1)
      valueType = complex
      DependentVariableQuantity = dimensionless
      CustomDependentVariableUnit = m
      SourceTermQuantity = dimensionless
      CustomSourceTermUnit = m

Mesh
  mesh1 "Mesh 1" (physics-controlled)

Studies
  std1 "Study 1"
    stat: Stationary

Solver configurations
  sol1 "Solution 1" (study std1)
    v1: Variables "Dependent Variables 1"
    s1: Stationary "Stationary Solver 1"
      dDef: Direct
      fc1: FullyCoupled | linsolver = dDef

Datasets
  dset1: Solution | solution = sol1
  cpt1: CutPoint2D | data = dset1; pointx = x0+r*cos({range(0,1,n-1)}*2*pi/6); pointy = y0+r*sin({range(0,1,n-1)}*2*pi/6)

Derived values
  gev1: EvalGlobal "Variable f" | data = dset1; table = tbl1; expr = f; descr = State variable f
  pev1: EvalPoint "Point Evaluation 1" | data = cpt1; table = tbl2; expr = u

Tables
  tbl1: Table
    // Global Evaluation 1
    State variable f | State variable f | State variable f | State variable f | State variable f | State variable f | State variable f | State variable f
    1.6872 | 5.7867 | 5.30049 | 4.54487 | 7.11365 | 2.12132 | 3.98149 | 0.883401
  tbl2: Table
    // Point Evaluation 1
    (0.8, 0.3) | (0.55, 0.73301) | (0.05, 0.73301) | (-0.2, 0.3) | (0.05, -0.13301) | (0.55, -0.13301)
    -0.0959659 | -0.0990041 | -0.12986 | -0.232091 | -0.25587 | -0.187208

Plots
  pg1: PlotGroup2D "2D Plot Group 1" | data = dset1
    surf1: Surface | expr = u
  pg2: PlotGroup2D "2D Plot Group 2" | data = dset1
    surf1: Surface | expr = u
      hght1: Height "Height Expression 1" | expr = u