// COMSOL Multiphysics 6.0.0.318 model "ЛР4, Приклад 5.1.mph"
// Outline of the model tree
// Unit system: none

Geometry
  geom1 "Geometry 1" (3D, length unit m)
    cyl1: Cylinder | pos = {0, 0, -15}; r = 15; h = 30
    fin: Finalize "Form Union"
  pgeom_pt "Geometry" (1D, length unit m)
    pt1: Point

Physics
  pt: MathParticle "Mathematical Particle Tracing" on all domains
    dependent variable q = {qx, qy, qz}
    dependent variable v = {vx, vy, vz}
    Formulation.Formulation = Massless
    wall1: Wall (default)
    pp1: ParticleProperties | v = {qy-qz, qz-qx, qx-2*qy}
    relg1: ReleaseGrid "Release from Grid 1" | x0 = {1, 0, 2}

Mesh
  mesh1 "Mesh 1" (physics-controlled)

Studies
  std1 "Study 1"
    time: Transient "Time Dependent" | tlist = range(0,0.1,20)

Solver configurations
  sol1 "Solution 1" (study std1)
    v1: Variables "Dependent Variables 1"
    t1: Time "Time-Dependent Solver 1"
      tlist = range(0,0.1,20)
      rtol = 1.0E-5
      timemethod = genalpha
      estrat = exclude
      tstepsgenalpha = strict
      fc1: FullyCoupled | linsolver = i1; ntolfact = 0.1
      i1: Iterative
        ja1: Jacobi

Datasets
  dset1: Solution | solution = sol1
  part1: Particle
    solution = sol1
    pgeomspec = fromphysics
    pgeom = pgeom_pt
    posdof = {comp1.qx, comp1.qy, comp1.qz}
    physicsinterface = pt

Plots
  pg1: PlotGroup3D "Particle Trajectories (pt)" | data = part1
    traj1: ParticleTrajectories | linetype = tube; radiusexpr = 0.3
      col1: Color "Color Expression 1" | expr = pt.V
  pg2: PlotGroup1D "1D Plot Group 2" | data = part1
    ptp1: Particle1D "Particle 1" | expr = qx; legends = x
    ptp2: Particle1D "Particle 2" | expr = qy; legends = y
    ptp3: Particle1D "Particle 3" | expr = qz; legends = z