// COMSOL Multiphysics 6.0.0.318 model "ЛР4, Приклад 5.2.mph"
// Outline of the model tree
// Unit system: none

Geometry
  geom1 "Geometry 1" (3D, length unit m)
    cyl1: Cylinder | pos = {0, 0, -2}; r = 10; h = 10
    fin: Finalize "Form Union"
  pgeom_pt "Geometry" (1D, length unit m)
    pt1: Point

Physics
  pt: MathParticle "Mathematical Particle Tracing" on all domains
    dependent variable q = {qx, qy, qz}
    Formulation.Formulation = Massless
    wall1: Wall (default)
    pp1: ParticleProperties | v = {-qy-qz, qx+0.425*qy, 2-qz*(4-qx)}
    relg1: ReleaseGrid "Release from Grid 1" | x0 = {-0.04, -0.3, 0.52}

Mesh
  mesh1 "Mesh 1" (physics-controlled)

Studies
  std1 "Study 1"
    time: Transient "Time Dependent" | tlist = range(0,0.1,25)

Solver configurations
  sol1 "Solution 1" (study std1)
    v1: Variables "Dependent Variables 1"
    t1: Time "Time-Dependent Solver 1"
      tlist = range(0,0.1,25)
      rtol = 1.0E-5
      timemethod = genalpha
      estrat = exclude
      tstepsgenalpha = strict
      fc1: FullyCoupled | linsolver = i1; ntolfact = 0.1
      i1: Iterative
        ja1: Jacobi

Datasets
  dset1: Solution | solution = sol1
  part1: Particle
    solution = sol1
    pgeomspec = fromphysics
    pgeom = pgeom_pt
    posdof = {comp1.qx, comp1.qy, comp1.qz}
    physicsinterface = pt
  cpl1: CutPlane | data = part1; quickplane = zy

Plots
  pg1: PlotGroup3D "Particle Trajectories (pt)" | data = part1
    traj1: ParticleTrajectories | linetype = tube; radiusexpr = 0.1
      col1: Color "Color Expression 1" | expr = pt.V
  pg2: PlotGroup3D "Particle Trajectories (pt) 1" | data = part1
    traj1: ParticleTrajectories | linetype = tube; radiusexpr = 0.1
      col1: Color "Color Expression 1" | expr = pt.V
    surf1: Surface | data = cpl1; expr = 1
    poma1: PoincareMap "Poincaré Map 1" | data = cpl1; sphereradiusscale = 0.2
  pg3: PlotGroup1D "1D Plot Group 3" | data = dset1
    ptp1: Particle1D "Particle 1" | data = part1; expr = pt.V