// COMSOL Multiphysics 6.0.0.318 model "ЛР4, Приклад 5.3.mph"
// Outline of the model tree
// Unit system: none

Parameters
  m1 = 3
  m2 = 1
  k1 = 1
  k2 = 0.25
  c = 0.5
  P = 2
  w = pi/2

Geometry
  geom1 "Geometry 1" (2D, length unit m)
    sq1: Square | base = center; size = 6
    fin: Finalize "Form Union"
  pgeom_pt "Geometry" (1D, length unit m)
    pt1: Point

Physics
  pt: MathParticle "Mathematical Particle Tracing" on all domains
    dependent variable q = {qx, qy, qz}
    wall1: Wall (default)
    pp1: ParticleProperties | mp = 1
    relg1: ReleaseGrid "Release from Grid 1" | v0 = {1, 1, 0}
    for1: Force on domains 1
      F = {-k1/m1*qx+k2/m1*(qy-qx)+c/m1*(pt.vy-pt.vx)+P/m1*cos(w*t), -k2/m2*(qy-qx)-c/m2*(pt.vy-pt.vx), 0}

Mesh
  mesh1 "Mesh 1" (physics-controlled)

Studies
  std1 "Study 1"
    time: Transient "Time Dependent" | tlist = range(0,0.1,50)

Solver configurations
  sol1 "Solution 1" (study std1)
    v1: Variables "Dependent Variables 1"
    t1: Time "Time-Dependent Solver 1"
      tlist = range(0,0.1,50)
      rtol = 1.0E-5
      timemethod = genalpha
      estrat = exclude
      tstepsgenalpha = strict
      fc1: FullyCoupled | linsolver = i1; ntolfact = 0.1
      i1: Iterative
        ja1: Jacobi

Datasets
  dset1: Solution | solution = sol1
  part1: Particle
    solution = sol1
    pgeomspec = fromphysics
    pgeom = pgeom_pt
    posdof = {comp1.qx, comp1.qy}
    physicsinterface = pt

Plots
  pg1: PlotGroup1D "1D Plot Group 1" | data = dset1
    ptp1: Particle1D "Particle 1" | data = part1; expr = qx; legends = qx
    ptp2: Particle1D "Particle 2" | data = part1; expr = qy; legends = qx