// COMSOL Multiphysics 6.0.0.318 model "ЛР4, Приклад 1.2.mph"
// Outline of the model tree
// Unit system: none

Physics
  ge: GlobalEquations "Global ODEs and DAEs"
    ge1: GlobalEquations
      name = {u, v, w}
      equation = {ut+u+2*v, vt-u-w, u+v+w}
      initialValueU = {-1, 3, -1}
      initialValueUt = {0, 0, 0}
      description = {, , }
      valueType = complex
      DependentVariableQuantity = dimensionless
      CustomDependentVariableUnit = m
      SourceTermQuantity = dimensionless
      CustomSourceTermUnit = m

Studies
  std1 "Study 1"
    time: Transient "Time Dependent" | tlist = range(0,0.01,7)

Solver configurations
  sol1 "Solution 1" (study std1)
    v1: Variables "Dependent Variables 1"
    t1: Time "Time-Dependent Solver 1" | tlist = range(0,0.01,7)
      dDef: Direct
      fc1: FullyCoupled | linsolver = dDef

Datasets
  dset1: Solution | solution = sol1

Derived values
  gev1: EvalGlobal "Global Evaluation 1"
    data = dset1
    expr = {u, v, w}
    descr = {State variable u, State variable v, State variable w}

Plots
  pg1: PlotGroup1D "1D Plot Group 1" | data = dset1
    glob1: Global
      expr = {u, v, w, comp1.u+comp1.v+comp1.w}
      descr = {State variable u, State variable v, State variable w, Summa}