// COMSOL Multiphysics 6.0.0.318 model "ЛР4, Приклад 1.4.mph"
// Outline of the model tree
// Unit system: none

Physics
  ge: GlobalEquations "Global ODEs and DAEs"
    ge1: GlobalEquations
      name = {u, v}
      equation = {utt-v/4, u+v-cos(t)}
      initialValueU = {-1, 0}
      initialValueUt = {0, 0}
      description = {, }
      valueType = complex
      DependentVariableQuantity = dimensionless
      CustomDependentVariableUnit = m
      SourceTermQuantity = dimensionless
      CustomSourceTermUnit = m

Studies
  std1 "Study 1"
    time: Transient "Time Dependent" | tlist = range(0,0.01,8*pi)

Solver configurations
  sol1 "Solution 1" (study std1)
    v1: Variables "Dependent Variables 1"
    t1: Time "Time-Dependent Solver 1" | tlist = range(0,0.01,8*pi)
      dDef: Direct
      fc1: FullyCoupled | linsolver = dDef

Datasets
  dset1: Solution | solution = sol1

Derived values
  gev1: EvalGlobal "Global Evaluation 1" | data = dset1; expr = {u, v}; descr = {State variable u, State variable v}

Plots
  pg1: PlotGroup1D "1D Plot Group 1" | data = dset1
    glob1: Global | expr = {u, v}; descr = {State variable u, State variable v}; legends = {u, v}