// COMSOL Multiphysics 6.0.0.318 model "ЛР4, Приклад 1.5.mph"
// Outline of the model tree
// Unit system: none

Physics
  ge: GlobalEquations "Global ODEs and DAEs"
    ge1: GlobalEquations
      name = {u, v}
      equation = {ut-2*v-u*v, u^2/4+v^2-1}
      initialValueU = {-1.5, 1}
      initialValueUt = {0, 0}
      description = {, }
      valueType = complex
      DependentVariableQuantity = dimensionless
      CustomDependentVariableUnit = m
      SourceTermQuantity = dimensionless
      CustomSourceTermUnit = m

Studies
  std1 "Study 1"
    time: Transient "Time Dependent" | tlist = range(0,0.01,10); usertol = on; rtol = 0.0001

Solver configurations
  sol1 "Solution 1" (study std1)
    v1: Variables "Dependent Variables 1"
    t1: Time "Time-Dependent Solver 1" | tlist = range(0,0.01,10); atolglobalfactor = 0.0001
      dDef: Direct
      fc1: FullyCoupled | linsolver = dDef; dtech = auto

Datasets
  dset1: Solution | solution = sol1

Derived values
  gev1: EvalGlobal "Global Evaluation 1" | data = dset1; expr = {u, v}; descr = {State variable u, State variable v}

Plots
  pg1: PlotGroup1D "1D Plot Group 1" | data = dset1
    glob1: Global | expr = {u, v}; descr = {State variable u, State variable v}; legends = {u, v}
  pg2: PlotGroup1D "1D Plot Group 2" | data = dset1
    glob1: Global
      expr = {u, v, comp1.v}
      descr = {State variable u, State variable v, v}
      xdata = expr
      xdataexpr = comp1.u