// COMSOL Multiphysics 6.0.0.318 model "ЛР4, Приклад 2.1.mph"
// Outline of the model tree
// Unit system: none

Parameters
  a = 10
  b = 1

Functions
  an1: Analytic | funcname = f; expr = 2+12*x+3*x^2-2*x^3
  an2: Analytic | funcname = g; expr = exp(x*y); args = {x, y}

Physics
  ge: GlobalEquations "Global ODEs and DAEs"
    ge1: GlobalEquations
      name = {u, v, w, X, Y, Z}
      equation = {d(f(u),u), d(d(f(v),v),v), a-integrate(f(x),x,0,w), a-integrate(f(x),x,X,Y), Y-X-b, integrate(g(x,Z),x,0,Z)-a}
      initialValueU = {2.5, 0, 0, 1, 2, 1}
      initialValueUt = {0, 0, 0, 0, 0, 0}
      description = {, , , , , }
      valueType = complex
      DependentVariableQuantity = dimensionless
      CustomDependentVariableUnit = m
      SourceTermQuantity = dimensionless
      CustomSourceTermUnit = m

Studies
  std1 "Study 1"
    time: Transient "Time Dependent" | tlist = range(0,0.1,1)

Solver configurations
  sol1 "Solution 1" (study std1)
    v1: Variables "Dependent Variables 1"
    t1: Time "Time-Dependent Solver 1" | tlist = range(0,0.1,1)
      dDef: Direct
      fc1: FullyCoupled | linsolver = dDef

Datasets
  dset1: Solution | solution = sol1

Derived values
  gev1: EvalGlobal "Variable w"
    data = dset1
    table = tbl1
    expr = {u, v, w}
    descr = {State variable u, State variable v, State variable w}
  gev2: EvalGlobal "Variable X"
    data = dset1
    table = tbl1
    expr = {comp1.X, comp1.Y, comp1.Z}
    descr = {Variable X, Variable Y, Variable Z}

Tables
  tbl1: Table
    // Global Evaluation 1
    Time | Variable X | Variable Y | Variable Z
    0 | 0.115622 | 1.11562 | 1.7015
    0.1 | 0.115622 | 1.11562 | 1.7015
    0.2 | 0.115622 | 1.11562 | 1.7015
    0.3 | 0.115622 | 1.11562 | 1.7015
    0.4 | 0.115622 | 1.11562 | 1.7015
    0.5 | 0.115622 | 1.11562 | 1.7015
    0.6 | 0.115622 | 1.11562 | 1.7015
    0.7 | 0.115622 | 1.11562 | 1.7015
    0.8 | 0.115622 | 1.11562 | 1.7015
    0.9 | 0.115622 | 1.11562 | 1.7015
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
Plots
  pg1: PlotGroup1D "1D Plot Group 1" | data = dset1
    glob1: Global | expr = {u, v}; descr = {State variable u, State variable v}