// COMSOL Multiphysics 6.0.0.318 model "ЛР4, Приклад 2.2.mph"
// Outline of the model tree

Functions
  int2: Interpolation | funcs = {L, 1}; source = file; filename = C:\Users\sereg\Desktop\InterpData_01.txt; defvars = on

Variables
  var1 "Variables 1"
    P = c0*x^3+c1*x^2+c2*x+c3
    R = intop1((L-P)^2)

Couplings
  intop1: Integration on all domains

Geometry
  geom1 "Geometry 1" (1D, length unit m)
    i1: Interval | coord = 0, 1
    pt1: Point | p = 0,0.1,0.2,0.3,0.4,0.5,0.6,0.7,0.8,0.9,1.0; pid = {0, 1, 2, 3, 4, 5, 6, 7, 8, 9, 10}
    fin: Finalize "Form Union"

Physics
  ge: GlobalEquations "Global ODEs and DAEs"
    ge1: GlobalEquations
      name = {c0, c1, c2, c3}
      equation = {d(R,c0), d(R,c1), d(R,c2), d(R,c3)}
      initialValueU = {0, 0, 0, 0}
      initialValueUt = {0, 0, 0, 0}
      description = {, , , }
      valueType = complex
      DependentVariableQuantity = dimensionless
      CustomDependentVariableUnit = m
      SourceTermQuantity = dimensionless
      CustomSourceTermUnit = m

Mesh
  mesh1 "Mesh 1"
    size: MeshSizeDefault | hmax = 0.067; hmin = 3.0E-4; hcurve = 0.3; hgrad = 1.3
    edg2: Edge on remaining entities
      dis1: Distribution on all domains | numelem = 1

Studies
  std1 "Study 1"
    stat: Stationary

Solver configurations
  sol1 "Solution 1" (study std1)
    v1: Variables "Dependent Variables 1"
    s1: Stationary "Stationary Solver 1"
      dDef: Direct
      fc1: FullyCoupled | linsolver = dDef

Datasets
  dset1: Solution | solution = sol1

Derived values
  gev1: EvalGlobal "Global Evaluation 1"
    data = dset1
    table = tbl1
    expr = {c0, c1, c2, c3}
    descr = {State variable c0, State variable c1, State variable c2, State variable c3}

Tables
  tbl1: Table
    // Global Evaluation 1
    State variable c0 (1) | State variable c1 (1) | State variable c2 (1) | State variable c3 (1)
    1.76652 | -1.33323 | 0.689763 | 0.00439891

Plots
  pg1: PlotGroup1D "1D Plot Group 1" | data = dset1
    lngr1: LineGraph on all domains
  pg2: PlotGroup1D "1D Plot Group 2" | data = dset1
    lngr1: LineGraph on all domains | expr = P; xdata = expr; xdataexpr = x
    lngr2: LineGraph on all domains | expr = L; xdata = expr; xdataexpr = x