// COMSOL Multiphysics 6.0.0.318 model "ЛР4, Приклад 2.3.mph"
// Outline of the model tree
// Unit system: none

Functions
  an1: Analytic | funcname = F; expr = sin(pi*x)*exp(3*x)

Variables
  var1 "Variables 1"
    L = a0+a1*x+c1*abs(x-0.2)+ c2*abs(x-0.4)+c3*abs(x-0.6)+c4*abs(x-0.8)

Geometry
  geom1 "Geometry 1" (1D, length unit m)
    i1: Interval | coord = 0, 1
    fin: Finalize "Form Union"

Physics
  ge: GlobalEquations "Global ODEs and DAEs"
    ge1: GlobalEquations
      name = {a0, c1, c2, c3, c4, a1}
      equation = {at1(0,L)-F(0), at1(0.2,L)-F(0.2), at1(0.4,L)-F(0.4), at1(0.6,L)-F(0.6), at1(0.8,L)-F(0.8), at1(1,L)-F(1)}
      initialValueU = {0, 0, 0, 0, 0, 0}
      initialValueUt = {0, 0, 0, 0, 0, 0}
      description = {, , , , , }
      valueType = complex
      DependentVariableQuantity = dimensionless
      CustomDependentVariableUnit = m
      SourceTermQuantity = dimensionless
      CustomSourceTermUnit = m

Mesh
  mesh1 "Mesh 1" (physics-controlled)

Studies
  std1 "Study 1"
    stat: Stationary

Solver configurations
  sol1 "Solution 1" (study std1)
    v1: Variables "Dependent Variables 1"
    s1: Stationary "Stationary Solver 1"
      dDef: Direct
      fc1: FullyCoupled | linsolver = dDef

Datasets
  dset1: Solution | solution = sol1

Derived values
  gev1: EvalGlobal "Global Evaluation 1"
    data = dset1
    table = tbl1
    expr = {a0, c1, c2, c3, c4, a1}
    descr = {State variable a0, State variable c1, State variable c2, State variable c3, State variable c4, State variable a1}

Tables
  tbl1: Table
    // Global Evaluation 1
    State variable a0 | State variable c1 | State variable c2 | State variable c3 | State variable c4 | State variable a1
    16.1982 | 2.53897 | 1.27333 | -4.67558 | -18.0124 | -13.5206

Plots
  pg1: PlotGroup1D "1D Plot Group 1" | data = dset1
    lngr1: LineGraph on all domains | expr = F(x); xdata = expr; xdataexpr = x
    lngr2: LineGraph on all domains | expr = L; xdata = expr; xdataexpr = x