// COMSOL Multiphysics 6.0.0.318 model "ЛР4, Приклад 3.1.mph"
// Outline of the model tree
// Unit system: none

Functions
  an1: Analytic | funcname = K; expr = x-t; args = {x, t}

Variables
  var1 "Variables 1"
    P = c0+c1*x+c2*x^2+c3*x^3
    R = P+intop1(P*K(dest(x),x)*(x<=dest(x)))-2*sinh(x)-1

Couplings
  intop1: Integration on all domains

Geometry
  geom1 "Geometry 1" (1D, length unit m)
    i1: Interval | coord = {0, 3}; left = 3
    fin: Finalize "Form Union"

Physics
  ge: GlobalEquations "Global ODEs and DAEs"
    ge1: GlobalEquations
      name = {c0, c1, c2, c3}
      equation = {at1(0,R), at1(1,R), at1(2,R), at1(3,R)}
      initialValueU = {0, 0, 0, 0}
      initialValueUt = {0, 0, 0, 0}
      description = {, , , }
      valueType = complex
      DependentVariableQuantity = dimensionless
      CustomDependentVariableUnit = m
      SourceTermQuantity = dimensionless
      CustomSourceTermUnit = m

Mesh
  mesh1 "Mesh 1" (physics-controlled)

Studies
  std1 "Study 1"
    stat: Stationary

Solver configurations
  sol1 "Solution 1" (study std1)
    v1: Variables "Dependent Variables 1"
    s1: Stationary "Stationary Solver 1"
      dDef: Direct
      fc1: FullyCoupled | linsolver = dDef

Datasets
  dset1: Solution | solution = sol1

Derived values
  gev1: EvalGlobal "Global Evaluation 1"
    data = dset1
    table = tbl1
    expr = {c0, c1, c2, c3}
    descr = {State variable c0, State variable c1, State variable c2, State variable c3}

Tables
  tbl1: Table
    // Global Evaluation 1
    State variable c0 | State variable c1 | State variable c2 | State variable c3
    1 | 2.66754 | -1.72762 | 0.580824

Plots
  pg1: PlotGroup1D "1D Plot Group 1" | data = dset1
    lngr1: LineGraph on all domains | expr = P; xdata = expr; xdataexpr = x
    lngr2: LineGraph on all domains | expr = cos(x)+sin(x)+sinh(x); xdata = expr; xdataexpr = x