// COMSOL Multiphysics 6.0.0.318 model "Каплаушенко, Лабораторна 5.mph"
// Outline of the model tree
// Unit system: none

Parameters
  K = 0.01
  v0 = 10
  H = 0
  a = pi/4

Physics
  ge: GlobalEquations "Global ODEs and DAEs"
    ge1: GlobalEquations
      name = {X, Y, Th}
      equation = {Xtt+K*Xt*sqrt(Xt^2+Yt^2+eps), Ytt+K*Yt*sqrt(Xt^2+Yt^2+eps)+g_const, Tht-(Yt>0)}
      initialValueU = {0, H, 0}
      initialValueUt = {v0*cos(a), v0*sin(a), 0}
      description = {, , }
      valueType = complex
      DependentVariableQuantity = dimensionless
      CustomDependentVariableUnit = m
      SourceTermQuantity = dimensionless
      CustomSourceTermUnit = m
  ev: Events
    is1: IndicatorStates | indDim = Z1; g = Yt; dimInit = v0*sin(a)
    impl1: ImplicitEvent | condition = Z1<0; reInitName = {Ymax, TYmax}; reInitValue = {Y, t}
    ds1: DiscreteStates | dim = {Ymax, TYmax}; dimInit = {0, 0}; dimDescr = {, }

Studies
  std1 "Study 1"
    time: Transient "Time Dependent"
      tlist = range(0,0.1,1.5)
      usertol = on
      rtol = 0.0001
      useparam = on
      pname = K
      plistarr = 0.1 0.2 0.3 0.5

Solver configurations
  sol1 "Solution 1" (study std1)
    v1: Variables "Dependent Variables 1"
    t1: Time "Time-Dependent Solver 1" | tlist = range(0,0.1,1.5); maxstepconstraintbdf = const; maxstepbdf = 0.005
      dDef: Direct
      fc1: FullyCoupled | linsolver = dDef
      st1: StopCondition
        stopcondterminateon = true
        stopconddesc = Stop expression 1
        stopcondarr = comp1.Y<=0 && comp1.Yt<0
      tpDef: TimeParametric

Datasets
  dset1: Solution | solution = sol1

Derived values
  gev1: EvalGlobal "Distance" | data = dset1; table = tbl5; expr = comp1.X; descr = Distance
  gev2: EvalGlobal "Height" | data = dset1; table = tbl4; expr = timemax(0,t,comp1.Y); descr = Height
  gev3: EvalGlobal "Height 1" | data = dset1; table = tbl6; expr = comp1.Y; descr = Height; dataseries = maximum
  gev4: EvalGlobal "MaxHeightTime" | data = dset1; table = tbl7; expr = comp1.Th; descr = MaxHeightTime
  gev5: EvalGlobal "MaxHeightTime 2" | data = dset1; table = tbl9; expr = comp1.TYmax; descr = TYmax
  gev6: EvalGlobal "MaxHeight" | data = dset1; table = tbl9; expr = comp1.Ymax; descr = MaxHeight

Tables
  tbl1: Table
    // Distance
    Time | True, Distance | Distance
    1.41319 | 9.45792 | 9.45792
  tbl2: Table
    // Distance
    Time | Distance | Distance
    1.41319 | 9.45792 | 9.45792
  tbl3: Table
    // Distance
    Maximum: Maximum : Height | Maximum: Height
    2.44635 | 2.44635
  tbl4: Table
    // Distance
    Time | Distance | Height | Moment of maximum height
    1.41319 | 9.45792 | 2.44635 | 0.699838
  tbl5: Table
    // Distance
    K | Time | Distance
    0.1 | 1.22729 | 5.96831
    0.2 | 1.10253 | 4.38524
    0.3 | 1.01999 | 3.52706
    0.5 | 0.903437 | 2.58005
  tbl6: Table
    // Height 1
    Maximum: Height | Maximum: Height | Maximum: Height | Maximum: Height
    1.85203 | 1.50909 | 1.28026 | 1.02386
  tbl7: Table
    // MaxHeightTime
    K | Time | MaxHeightTime
    0.1 | 1.22999 | 0.577268
    0.2 | 1.10324 | 0.500731
    0.3 | 1.01967 | 0.451669
    0.5 | 0.903748 | 0.387512
  tbl8: Table
    // MaxHeightTime 2
    K | Time | TYmax | State variable Y | State variable Th
    0.1 | 1.22792 | 0.576537 | -0.0132325 | 0.576072
    0.2 | 1.10232 | 0.501179 | -0.00516475 | 0.500669
    0.3 | 1.0175 | 0.451568 | -0.00609659 | 0.450963
    0.5 | 0.903055 | 0.387439 | -0.00516679 | 0.386698
  tbl9: Table
    // MaxHeightTime 2
    K | Time | TYmax | MaxHeight
    0.1 | 1.22792 | 0.576537 | 1.85482
    0.2 | 1.10232 | 0.501179 | 1.50909
    0.3 | 1.0175 | 0.451568 | 1.29176
    0.5 | 0.903055 | 0.387439 | 1.02463

Plots
  pg1: PlotGroup1D "1D Plot Group 1" | data = dset1
    glob1: Global
      expr = comp1.Y
      descr = State variable Y
      xdata = expr
      xdataexpr = comp1.X
      legends = {k=0.1, k=0.2, k=0.3, k=0.5}