// COMSOL Multiphysics 6.0.0.318 model "ЛР6, Приклад 1.1.mph"
// Outline of the model tree

Parameters
  k = 1e-3[1/s]
  D = 1e-7[m*m/s]

Geometry
  geom1 "Geometry 1" (2D, length unit m)
    r1: Rectangle | size = {0.3, 0.1}
    pt1: Point | p = {0.2, }
    fin: Finalize "Form Union"

Physics
  g: GeneralFormPDE on all domains
    dependent variable C
    gfeq1: GeneralFormPDE (default) | f = k*C; Ga = {D*Cx, D*Cy}; da = 0
    zflx1: ZeroFluxBoundary "Zero Flux 1" (default)
    init1: init "Initial Values 1" (default)
    dir1: DirichletBoundary "Dirichlet Boundary Condition 1" on boundaries 1 | r = 20-C
    dir2: DirichletBoundary "Dirichlet Boundary Condition 2" on boundaries 4 | r = 100-C
    flux1: FluxBoundary "Flux/Source 1" on boundaries 2
    flux2: FluxBoundary "Flux/Source 2" on boundaries 3
    flux3: FluxBoundary "Flux/Source 3" on boundaries 5

Mesh
  mesh1 "Mesh 1" (physics-controlled)
    size: MeshSizeDefault | hauto = 1

Studies
  std1 "Study 1"
    stat: Stationary

Solver configurations
  sol1 "Solution 1" (study std1)
    v1: Variables "Dependent Variables 1"
    s1: Stationary "Stationary Solver 1"
      dDef: Direct
      fc1: FullyCoupled | linsolver = dDef

Datasets
  dset1: Solution | solution = sol1

Plots
  pg1: PlotGroup2D "2D Plot Group 1" | data = dset1
    surf1: Surface | expr = C