// COMSOL Multiphysics 6.0.0.318 model "ЛР6, Приклад 1.2.mph"
// Outline of the model tree

Parameters
  k__pr = 400 [W/(m*K)]

Geometry
  geom1 "Geometry 1" (2D, length unit m)
    r1: Rectangle | size = {0.2, 0.1}
    pt1: Point | p = {0.1, }
    fin: Finalize "Form Union"

Physics
  g: GeneralFormPDE on all domains
    dependent variable T
    gfeq1: GeneralFormPDE (default) | f = 0; Ga = {-400*Tx, -400*Ty}; da = 0
    zflx1: ZeroFluxBoundary "Zero Flux 1" (default)
    init1: init "Initial Values 1" (default)
    flux1: FluxBoundary "Flux/Source 1" on boundaries 1, 2, 5
    dir1: DirichletBoundary "Dirichlet Boundary Condition 1" on boundaries 3 | r = 2000-T
    dir2: DirichletBoundary "Dirichlet Boundary Condition 2" on boundaries 4 | r = 60-T

Mesh
  mesh1 "Mesh 1" (physics-controlled)
    size: MeshSizeDefault | hauto = 1

Studies
  std1 "Study 1"
    stat: Stationary

Solver configurations
  sol1 "Solution 1" (study std1)
    v1: Variables "Dependent Variables 1"
    s1: Stationary "Stationary Solver 1"
      dDef: Direct
      fc1: FullyCoupled | linsolver = dDef

Datasets
  dset1: Solution | solution = sol1

Plots
  pg1: PlotGroup2D "2D Plot Group 1" | data = dset1
    surf1: Surface | expr = T