// COMSOL Multiphysics 6.0.0.318 model "ЛР6, Приклад 1.5.mph"
// Outline of the model tree

Parameters
  m = 4.3

Geometry
  geom1 "Geometry 1" (1D, length unit m)
    i1: Interval | coord = {0, 0.1}
    fin: Finalize "Form Union"

Physics
  g: GeneralFormPDE on all domains
    dependent variable T
    gfeq1: GeneralFormPDE (default) | f = (m^2)*T; Ga = Tx; da = 1
    zflx1: ZeroFluxBoundary "Zero Flux 1" (default)
    init1: init "Initial Values 1" (default) | T = 0
    dir1: DirichletBoundary "Dirichlet Boundary Condition 1" on boundaries 1 | r = 373-T
    flux1: FluxBoundary "Flux/Source 1" on boundaries 2

Mesh
  mesh1 "Mesh 1" (physics-controlled)

Studies
  std1 "Study 1"
    stat: Stationary

Solver configurations
  sol1 "Solution 1" (study std1)
    v1: Variables "Dependent Variables 1"
    s1: Stationary "Stationary Solver 1"
      dDef: Direct
      fc1: FullyCoupled | linsolver = dDef

Datasets
  dset1: Solution | solution = sol1

Plots
  pg1: PlotGroup1D "1D Plot Group 1" | data = dset1
    lngr1: LineGraph on all domains | expr = T; xdata = expr; xdataexpr = x