// COMSOL Multiphysics 6.0.0.318 model "Каплаушенко, Лабораторна 7.mph"
// Outline of the model tree
// Components: comp1 "Component 1", comp2 "Component 2"
// Unit system: none

Parameters
  q1 = -1
  q2 = -1
  q3 = -1
  E = 1
  J = 1

Couplings
  genext1: GeneralExtrusion on domains 1-3 | dstmap = x; srcmap = x

Geometry
  geom1 "Geometry 1" [comp1] (1D, length unit m)
    i1: Interval | coord = {0, 1/3, 2/3, 1}
    fin: Finalize "Form Union"
  geom2 "Geometry 2" [comp2] (2D, length unit m)
    r1: Rectangle | pos = {0, -0.1}; size = {1, 0.2}
    fin: Finalize "Form Union"

Physics
  c: CoefficientFormPDE [geom1] on all domains
    dependent variable w = {u, M}
    ShapeProperty.order = 3
    cfeq1: CoefficientFormPDE (default) | c = {-1, 0, 0, -1}; a = {0, 0, 1, 0}; f = {0, 0}; da = {0, 0, 0, 0}
    zflx1: ZeroFluxBoundary "Zero Flux 1" (default)
    init1: init "Initial Values 1" (default)
    dir1: DirichletBoundary "Dirichlet Boundary Condition 1" on boundaries 1, 4 | r = {0, 0}
    src1: SourceTerm "Source 1" on domains 1 | f = {0, -q1}
    src2: SourceTerm "Source 2" on domains 2 | f = {0, -q2}
    src3: SourceTerm "Source 3" on domains 3 | f = {0, -q3}

Mesh
  mesh1 "Mesh 1" [geom1] (physics-controlled)
    size: MeshSizeDefault | hauto = 3
  mesh2 "Mesh 2" [geom2]
    size: MeshSizeDefault | hmax = 0.025; custom = on
    map1: Map "Mapped 1" on remaining entities

Studies
  std1 "Study 1"
    stat: Stationary

Solver configurations
  sol1 "Solution 1" (study std1)
    v1: Variables "Dependent Variables 1"
    s1: Stationary "Stationary Solver 1"
      dDef: Direct
      fc1: FullyCoupled | linsolver = dDef

Datasets
  dset1: Solution | solution = sol1
  dset2: Solution | solution = sol1

Plots
  pg1: PlotGroup1D "1D Plot Group 1" | data = dset1
    lngr1: LineGraph on all domains | expr = u; xdata = expr; xdataexpr = x
  pg2: PlotGroup1D "1D Plot Group 2" | data = dset1
    lngr1: LineGraph on all domains | expr = M; xdata = expr; xdataexpr = x
    lngr2: LineGraph on all domains | expr = -uxx; xdata = expr; xdataexpr = x
  pg3: PlotGroup2D "2D Plot Group 3" | data = dset2
    surf1: Surface | expr = 1; wireframe = on
      def1: Deform "Deformation 1"
        expr = {-comp1.genext1(ux)/sqrt(1+comp1.genext1(ux)^2)*y, comp1.genext1(u)+y/sqrt(1+comp1.genext1(ux)^2)-y}
    surf2: Surface | expr = comp1.genext1(M)*y
      def1: Deform "Deformation 1"
        expr = {-comp1.genext1(ux)/sqrt(1+comp1.genext1(ux)^2)*y, comp1.genext1(u)+y/sqrt(1+comp1.genext1(ux)^2)-y}
  pg4: PlotGroup1D "1D Plot Group 4" | data = dset1
    lngr1: LineGraph on all domains | expr = u; xdata = expr; xdataexpr = x
    lngr2: LineGraph on all domains | expr = -(x-2*x^3+x^4)/24; xdata = expr; xdataexpr = x